# [reference: RealGasPropertiesUnits.xmcd]
G_f := π*(6.2 mm)^2*0.34*m/s*rgpDPT(1, 15 MPa, 270 °C) = 0.032044 kg/s
S_t := 12.45 m*π*16*mm = 0.625805 m^2
alw(u, T_f, T_w, T_f0, P) :=
    for i ∈ 0 .. length(u) - 1
        Re ← 12.4 mm*u[i]/rgpKINVISPT(1, P[i], T_f[i])
        Pr_f ← rgpPRANDTLEPT(1, P[i], T_f[i])
        Pr_w ← rgpPRANDTLEPT(1, P[i], T_w[i])
        λ ← rgpTHERMCONDPT(1, P[i], T_f[i])
        α[i] ← λ/(12.4 mm)*0.023*Re^0.8*Pr_f^0.4
        T_out[i] ← T_f0 + α[i]*0.097*m^2*(T_w[i] - T_f[i])/(rgpCPPT(1, P[i], T_f[i])*0.04*kg/s)
    T_out[0] ← T_f0 + α[0]*S_t/length(u)*(T_w[0] - T_f[0])/(rgpCPPT(1, P[0], T_f[0])*0.04*kg/s)
    for i ∈ 1 .. length(u) - 1
        T_out[i] ← T_out[i - 1] + α[i]*S_t/length(u)*(T_w[i] - T_f[i])/(rgpCPPT(1, P[i], T_f[i])*G_f)
    return [α*(W/(m^2*K))^-1; T_out*K^-1]
a_est := alw([0.2711039104; 0.3235354272; 0.3621302911; 0.3825525082; 0.3916738072]*m/s, [244.3907694; 297.2801432; 314.9200097; 321.2084568; 323.5485063] °C, [305.4305261; 317.7686143; 322.2626529; 323.9491222; 324.595167] °C, 80 °C, [15698717.03; 15696224.69; 15693902.45; 15691654.74; 15689437.91]*Pa)[0]*W/(m^2*K) = [3550.46; 4047.12; 4402.91; 4596.77; 4684.65] W/(m^2*K)
a_kor := [3855.855998; 4244.889868; 4483.652012; 4611.589706; 4651.836307]*W/(m^2*K)
T_est := alw([0.2711039104; 0.3235354272; 0.3621302911; 0.3825525082; 0.3916738072]*m/s, [244.3907694; 297.2801432; 314.9200097; 321.2084568; 323.5485063] °C, [305.4305261; 317.7686143; 322.2626529; 323.9491222; 324.595167] °C, 80 °C, [15698717.03; 15696224.69; 15693902.45; 15691654.74; 15689437.91]*Pa)[1]*K = [224.95; 285.063; 306.427; 314.379; 317.413] °C
Re_avg := (12.4 mm*0.34*m/s)/rgpKINVISPT(1, 15.7 MPa, ((80 + 323)/2) °C) = 26866.8
Pr_f_avg := rgpPRANDTLEPT(1, 15.7 MPa, ((80 + 323)/2) °C) = 0.904223
λ_avg := rgpTHERMCONDPT(1, 15.7 MPa, ((80 + 323)/2) °C) = 0.67063 kg*m/(K*s^3)
a_avg :=
    for i ∈ 0 .. length(a_kor) - 1
        a[i] ← λ_avg/(12.4 mm)*0.023*Re_avg^0.8*Pr_f_avg^0.4
    return a
i := 0 .. length(a_kor) - 1
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(a_est - a_kor)/a_kor = [-0.079202; -0.04659; -0.0180088; -0.0032139; 0.00705447]
(a_avg - a_kor)/a_kor = [0.0828075; -0.0164292; -0.068806; -0.0946398; -0.102473]
