# [reference: RealGasPropertiesUnits.xmcd]
G_f := 1.667*kg/s/44 = 0.0378864 kg/s
F_in := π*(6.2 mm)^2 = 0.000120763 m^2
u_f_in := G_f*rgpVPT(1, 15.7 MPa, ((40 + 280)/2) °C)/F_in = 0.342428 m/s
S_t := 12.45 m*π*16*mm = 0.625805 m^2
F_out := 0.00932 m^2/44 = 0.000211818 m^2
u_f_out := G_f*rgpVPT(1, 15.7 MPa, ((325 + 90)/2) °C)/F_out = 0.206432 m/s
alw_1(u, T_f, T_w, T_f0, P) :=
    for i ∈ 0 .. length(u) - 1
        Re ← 12.4 mm*u[i]/rgpKINVISPT(1, P[i], T_f[i])
        Pr_f ← rgpPRANDTLEPT(1, P[i], T_f[i])
        Pr_w ← rgpPRANDTLEPT(1, P[i], T_w[i])
        λ ← rgpTHERMCONDPT(1, P[i], T_f[i])
        α[i] ← λ/(12.4 mm)*0.023*Re^0.8*Pr_f^0.4
    T_out[0] ← T_f0 + α[0]*S_t/length(u)*(T_w[0] - T_f[0])/(rgpCPPT(1, P[0], T_f[0])*G_f)
    for i ∈ 1 .. length(u) - 1
        T_out[i] ← T_out[i - 1] + α[i]*S_t/length(u)*(T_w[i] - T_f[i])/(rgpCPPT(1, P[i], T_f[i])*G_f)
    return [α*(W/(m^2*K))^-1; T_out*K^-1]
alw_2(u, T_f, T_w, T_f0, P) :=
    for i ∈ 0 .. length(u) - 1
        Re ← 16 mm*u[i]/rgpKINVISPT(1, P[i], T_f[i])
        Pr_f ← rgpPRANDTLEPT(1, P[i], T_f[i])
        Pr_w ← rgpPRANDTLEPT(1, P[i], T_w[i])
        λ ← rgpTHERMCONDPT(1, P[i], T_f[i])
        α[i] ← λ/(16 mm)*0.023*Re^0.8*Pr_f^0.4
    T_out[0] ← T_f0 + α[0]*S_t/length(u)*(T_w[0] - T_f[0])/(rgpCPPT(1, P[0], T_f[0])*G_f)
    for i ∈ 1 .. length(u) - 1
        T_out[i] ← T_out[i - 1] + α[i]*S_t/length(u)*(T_w[i] - T_f[i])/(rgpCPPT(1, P[i], T_f[i])*G_f)
    return [α*(W/(m^2*K))^-1; T_out*K^-1]
a_est := alw_1([0.2655745413; 0.2666279131; 0.2749303136; 0.2875079237; 0.3046884975]*m/s, [49.36983573; 100.6268041; 152.8594339; 203.9192745; 251.4492779] °C, [56.18880594; 126.2500187; 176.1067285; 225.4982043; 271.6181084] °C, 40 °C, [15698408.71; 15695288.29; 15692299.32; 15689459.55; 15686787.17]*Pa)[0]*W/(m^2*K) = [2073.45; 2758.07; 3292.35; 3658.1; 3899.58] W/(m^2*K)
a_kor := [1880.707803; 2749.754414; 3132.802497; 3396.982962; 3559.168503]*W/(m^2*K)
T_est := alw_1([0.2655745413; 0.2666279131; 0.2749303136; 0.2875079237; 0.3046884975]*m/s, [49.36983573; 100.6268041; 152.8594339; 203.9192745; 251.4492779] °C, [56.18880594; 126.2500187; 176.1067285; 225.4982043; 271.6181084] °C, 40 °C, [15698408.71; 15695288.29; 15692299.32; 15689459.55; 15686787.17]*Pa)[1]*K = [51.2691; 107.082; 166.293; 225.086; 279.924] °C
Re_avg := (16 mm*0.34*m/s)/rgpKINVISPT(1, 15.7 MPa, ((40 + 250)/2) °C) = 26177
Pr_f_avg := rgpPRANDTLEPT(1, 15.7 MPa, ((40 + 250)/2) °C) = 1.18778
λ_avg := rgpTHERMCONDPT(1, 15.7 MPa, ((40 + 250)/2) °C) = 0.691953 kg*m/(K*s^3)
a_avg :=
    for i ∈ 0 .. length(a_kor) - 1
        a[i] ← λ_avg/(16 mm)*0.023*Re_avg^0.8*Pr_f_avg^0.4
    return a
i := 0 .. length(a_kor) - 1
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(a_est - a_kor)/a_kor = [0.102482; 0.00302423; 0.0509287; 0.0768681; 0.0956434]
(a_avg - a_kor)/a_kor = [0.93907; 0.326237; 0.164077; 0.0735481; 0.0246283]
